Bass := -56
Middle := 0
Tremble := 100
b[1] := Bass
b[2] := Middle
b[3] := Tremble
a[1] := b[1]
a[2] := (4*b[2] - 3*b[1] - b[3])/18
a[3] := (b[2] - b[1] - 9*a[2])/81
a[2] := 2*a[2]
a[3] := 4*a[3]
f(x) := a[3]*x^2 + a[2]*x + a[1]
a = [0; -56; 7.55556; 1.08642]
4.5^2 = 20.25
i := 1 .. 10
Eq[i] := f(i - 1)
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254/22 = 11.5455
Eq[i] = [-56; -47.358; -36.5432; -23.5556; -8.39506; 8.93827; 28.4444; 50.1235; 73.9753; 100]
254 - 127 = 127
22*11.55 = 254.1
a[1] := Eq[1]
a[3] := (5*Eq[10] + 4*a[1] - 9*Eq[6])/180
a[2] := (Eq[6] - a[1])/5 - 5*a[3]
f(x) := a[3]*x^2 + a[2]*x + a[1]
f(5) = 8.93827
a = [0; -56; 7.55556; 1.08642]
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